// SBML level 2 version 1

model plos_1_model()

  // Compartments:
  compartment compartment = 1;

  // Species:
  species $OCT4_Gene in compartment = 0;
  species $NANOG_Gene in compartment = 0;
  species $SOX2_Gene in compartment = 0;
  species $targetGene in compartment = 0.01;
  species $degradation in compartment = 0;
  species $p53 in compartment = 0;
  species $A in compartment = 10;
  species OCT4 in compartment = 0.01;
  species SOX2 in compartment = 0.01;
  species NANOG in compartment = 0.01;
  species OCT4_SOX2 in compartment = 0.1;
  species Protein in compartment = 0;

  // Parameters:
  ep1 = 0.0001;
  k1 = 1;
  a1 = 0.01;
  a2 = 0.5;
  f = 1000;
  k2 = 0.0011;
  b1 = 0.001;
  b2 = 0.001;
  g1 = 1;
  ep3 = 0.0001;
  e1 = 0.01;
  e2 = 0.1;
  f1 = 0.001;
  f2 = 0.001;
  beta = 0.01;
  g2 = 1;
  J4_k1 = 0.05;
  J4_k2 = 0.001;
  J5_k = 5;
  ep2 = 0.0001;
  k3 = 1;
  c1 = 0.01;
  c2 = 0.5;
  k4 = 0.0011;
  d1 = 0.001;
  d2 = 0.001;
  g3 = 1;
  p1 = 0.1;
  ep4 = 0.0001;
  h1 = 0.0011;
  h2 = 1;
  g4 = 0.01;

  // Reactions:
  J0: $OCT4_Gene => OCT4; (ep1 + k1*A + a1*OCT4_SOX2 + a2*OCT4_SOX2*NANOG)/(1 + ep1/f + k2*A + b1*OCT4_SOX2 + b2*OCT4_SOX2*NANOG);
  J1: OCT4 => $degradation; g1*OCT4;
  J2: $NANOG_Gene => NANOG; (ep3 + e1*OCT4_SOX2 + e2*OCT4_SOX2*NANOG)/(1 + ep3/f + f1*OCT4_SOX2 + f2*OCT4_SOX2*NANOG + beta*p53);
  J3: NANOG => $degradation; g2*NANOG;
  J4: OCT4 + SOX2 => OCT4_SOX2; J4_k1*OCT4*SOX2 - J4_k2*OCT4_SOX2;
  J5: OCT4_SOX2 => $degradation; J5_k*OCT4_SOX2;
  J6: $SOX2_Gene => SOX2; (ep2 + k3*A + c1*OCT4_SOX2 + c2*OCT4_SOX2*NANOG)/(1 + ep2/f + k4*A + d1*OCT4_SOX2 + d2*OCT4_SOX2*NANOG);
  J7: SOX2 => $degradation; g3*SOX2;
  J8: $targetGene => Protein; (p1*OCT4_SOX2 + ep4)/(1 + ep4/1000 + h1*OCT4_SOX2 + h2*OCT4_SOX2*NANOG);
  J9: Protein => $degradation; g4*Protein;
end
